*Heading
** Job name: CylinderFlattened Model name: CylinderNew01
** Generated by: Abaqus/CAE 6.14-1
*Preprint, echo=NO, model=NO, history=NO, contact=NO
** ----------------------------------------------------------------
**
** PART INSTANCE: PART-1-1
**
*Node
      1,   14.9665031,          15.,  -1.00188947
      2,   14.8661623,          15.,  -1.99930429
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*Element, type=S4R
   1,   94,    1,   95,  188
   2,    1,    2,   96,   95
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*Elset, elset=PART-1-1_SET-1, generate
    1,  2820,     1
** Section: Section-1-SET-1
*Shell Section, elset=PART-1-1_SET-1, material=MATERIAL-1
2., 5
*System
*Nset, nset=SET-1, generate
    1,  1457,     1
*Nset, nset=SET-2, generate
    1300,   2914,     1
*Nset, nset=SET-3, generate
 2821,  2914,     1
*Elset, elset=_SURF-1_E1
 5,
*Surface, type=ELEMENT, name=SURF-1
_SURF-1_E1, E1
**
** MATERIALS
**
*Material, name=MATERIAL-1
*Elastic
210000., 0.3
** ----------------------------------------------------------------
**
** STEP: Step-1
**
*Step, name=Step-1, nlgeom=NO
*Static
1., 1., 1e-05, 1.
**
** BOUNDARY CONDITIONS
**
** Name: Disp-BC-1 Type: Symmetry/Antisymmetry/Encastre
*Boundary
SET-2, ENCASTRE
** Name: Disp-BC-2 Type: Symmetry/Antisymmetry/Encastre
*Boundary
SET-3, ENCASTRE
**
** LOADS
**
** Name: ShellEdgeLoad-1   Type: Shell edge load
*Dsload
SURF-1, EDNOR, 1.
**
** OUTPUT REQUESTS
**
*Restart, write, frequency=0
**
** FIELD OUTPUT: F-Output-1
**
*Output, field, variable=PRESELECT
**
** HISTORY OUTPUT: H-Output-1
**
*Output, history, variable=PRESELECT
*End Step
