*Heading
** Job name: SphericalFlattened Model name: SphericalNew
** Generated by: Abaqus/CAE 6.14-1
*Preprint, echo=NO, model=NO, history=NO, contact=NO
** ----------------------------------------------------------------
**
** PART INSTANCE: PART-1-1
**
*Node
      1,          15.,         -15.,           0.
      2,          15.,          15.,           0.
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*Element, type=S4R
   1,    1,   97,  266,   98
   2,   97,   96,  267,  266
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*Element, type=S3
2821, 3843, 3785, 3842
2822, 4087, 4086, 4113
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*Elset, elset=PART-1-1_Set-1, generate
    1,  6170,     1
** Section: Section-1
*Shell Section, elset=PART-1-1_Set-1, material=Material-1
2., 5
*System
*Nset, nset=SET-1, generate
    1,  6123,     1
*Nset, nset=Set-2, generate
    1,  6123,     1
*Nset, nset=Set-3
 2007, 2008, 2009, 2010, 2100, 2101
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*Nset, nset=Set-4, generate
    1,  6123,     1
*Nset, nset=Set-5
 4887,
*Nset, nset=Set-6
 2991,
*Elset, elset=_Surf-1_SNEG
 3417,
*Surface, type=ELEMENT, name=Surf-1
_Surf-1_SNEG, SNEG
**
** MATERIALS
**
*Material, name=Material-1
*Elastic
210000., 0.3
** ----------------------------------------------------------------
**
** STEP: Step-1
**
*Step, name=Step-1, nlgeom=NO
*Static
1., 1., 1e-05, 1.
**
** BOUNDARY CONDITIONS
**
** Name: BC-1 Type: Symmetry/Antisymmetry/Encastre
*Boundary
Set-5, ENCASTRE
**
** LOADS
**
** Name: Load-1   Type: Concentrated force
*Cload
Set-6, 2, -1.
**
** OUTPUT REQUESTS
**
*Restart, write, frequency=0
**
** FIELD OUTPUT: F-Output-1
**
*Output, field, variable=PRESELECT
**
** HISTORY OUTPUT: H-Output-1
**
*Output, history, variable=PRESELECT
*End Step
