*Heading
** Job name: FlatPlateNew2 Model name: FlatPlateFlattenedUpdated
** Generated by: Abaqus/CAE 6.14-1
*Preprint, echo=NO, model=NO, history=NO, contact=NO
** ----------------------------------------------------------------
**
** PART INSTANCE: PART-1-1
**
*Node
      1,   14.9246674,    1.5014354,           0.
      2,   14.6994257,   2.98778987,           0.
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*Element, type=S3
 1, 3411, 2593, 2603
 2, 1537, 1402, 1421
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*Element, type=S4R
  89,  714,  929,  942,   14
  90, 1077,  960,  945, 1044
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*Elset, elset=PART-1-1_PART-1-1_SET-1, generate
    1,  3405,     1
** Section: Section-1-PART-1-1_SET-1
*Shell Section, elset=PART-1-1_PART-1-1_SET-1, material=MATERIAL-1
2., 5
*System
*Nset, nset=PART-1-1_SET-1, generate
    1,  3456,     1
*Nset, nset=SET-1, generate
    1,  3456,     1
*Elset, elset=SET-1, generate
    1,  3405,     1
*Nset, nset=Set-7
   1,   2,   3,   4,   5,   6
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*Elset, elset=_SURF-1_E1
  466,  467,  476,  477,  490, 1323, 1324, 1365, 1379, 1398, 1419, 1429
*Elset, elset=_SURF-1_E2
  102,  113,  115,  126,  128,  190
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*Elset, elset=_SURF-1_E3
  218,  374,  414,  434,  437,  450
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*Elset, elset=_SURF-1_E4
   89,  112,  114,  116,  117,  119
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*Elset, elset=_Surf-1_SNEG, generate
    1,  3405,     1
*Surface, type=ELEMENT, name=Surf-1
_Surf-1_SNEG, SNEG
**
** MATERIALS
**
*Material, name=MATERIAL-1
*Elastic
210000., 0.3
** ----------------------------------------------------------------
**
** STEP: Step-1
**
*Step, name=Step-1, nlgeom=NO
*Static
1., 1., 1e-05, 1.
**
** BOUNDARY CONDITIONS
**
** Name: BC-1 Type: Symmetry/Antisymmetry/Encastre
*Boundary
Set-7, ENCASTRE
**
** LOADS
**
** Name: Load-1   Type: Pressure
*Dsload
Surf-1, P, 1.
**
** OUTPUT REQUESTS
**
*Restart, write, frequency=0
**
** FIELD OUTPUT: F-Output-1
**
*Output, field, variable=PRESELECT
**
** HISTORY OUTPUT: H-Output-1
**
*Output, history, variable=PRESELECT
*End Step
