*Heading
** Job name: FP2Job Model name: FP2
** Generated by: Abaqus/CAE 6.14-1
*Preprint, echo=NO, model=NO, history=NO, contact=NO
** ----------------------------------------------------------------
**
** PART INSTANCE: Part-1-1
**
*Node
      1,   14.1872587,   4.87049198,           0.
      2,   11.8371077,   9.21319103,           0.
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*Element, type=S3
1, 45,  7,  8
*Element, type=S4R
 2, 21,  5,  6, 44
 3, 19,  1, 30, 24
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*Nset, nset=Set-1, generate
     1,  53,      1
*System
**
** MATERIALS
**
*Material, name=Material-1
*Elastic
210000., 0.3
** ----------------------------------------------------------------
**
** STEP: Step-1
**
*Step, name=Step-1, nlgeom=NO
*Static
1., 1., 1e-05, 1.
**
** OUTPUT REQUESTS
**
*Restart, write, frequency=0
**
** FIELD OUTPUT: F-Output-1
**
*Output, field, variable=PRESELECT
**
** HISTORY OUTPUT: H-Output-1
**
*Output, history, variable=PRESELECT
*End Step
