*Heading
** Job name: PipeElbowFlattened Model name: PipeElbowNewNew1
** Generated by: Abaqus/CAE 6.14-1
*Preprint, echo=NO, model=NO, history=NO, contact=NO
** ----------------------------------------------------------------
**
** PART INSTANCE: PART-1-1
**
*Node
      1,           0.,   15.8622131,   5.02480078
      2,           0.,    14.860055,   5.00065279
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*Element, type=S4R
   1,   94,    1,   95,  188
   2,    1,    2,   96,   95
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*Elset, elset=PART-1-1_Set-1, generate
    1,  2914,     1
** Section: Section-1
*Shell Section, elset=PART-1-1_Set-1, material=Material-1
2., 5
*System
*Nset, nset=SET-1, generate
    1,  1504,     1
*Nset, nset=Set-2, generate
  1500,  3008,   1
*Nset, nset=Set-3, generate
 2915,  3008,     1
*Elset, elset=_Surf-1_SPOS
 1206,
*Surface, type=ELEMENT, name=Surf-1
_Surf-1_SPOS, SPOS
*Elset, elset=_Surf-2_E3
 2900,
*Surface, type=ELEMENT, name=Surf-2
_Surf-2_E3, E3
**
** MATERIALS
**
*Material, name=Material-1
*Elastic
210000., 0.3
** ----------------------------------------------------------------
**
** STEP: Step-1
**
*Step, name=Step-1, nlgeom=NO
*Static
1., 1., 1e-05, 1.
**
** BOUNDARY CONDITIONS
**
** Name: BC-1 Type: Symmetry/Antisymmetry/Encastre
*Boundary
Set-2, ENCASTRE
**
** LOADS
**
** Name: Load-1   Type: Shell edge load
*Dsload
Surf-2, EDNOR, 1.
**
** OUTPUT REQUESTS
**
*Restart, write, frequency=0
**
** FIELD OUTPUT: F-Output-1
**
*Output, field, variable=PRESELECT
**
** HISTORY OUTPUT: H-Output-1
**
*Output, history, variable=PRESELECT
*End Step
